// COMSOL Multiphysics 5.5.0.359 model "July_3_melt_1.mph"
// Tin Melting Front
// Outline of the model tree

Parameters
  k_liq = 2.2[W/(m*K)]  // Melt Thermal conductivity
  Cp_liq = 1500[J/(kg*K)]  // Melt specific heat capacity
  alpha_Sn = 0[1/K]  // Coefficient of thermal expansion
  nu_Sn = 1.5[m^2/s]  // Kinematic viscosity
  rho_liq = 2600[kg/m^3]  // Melt density
  DelH = 418.4[kJ/kg]  // Latent heat of fusion
  Tf = 1523.15  // Melting point
  Th = 1700[K]  // Hot wall temperature
  Tc = 400[K]  // Cold wall temperature
  p_ref = 0[Pa]  // Gauge pressure
  L = 0.03[m]  // length
  loc = 4.75E-6  // initial moving boudnary position
  k_sol = 1.5[W/(m*K)]  // Solid thermal conductivity
  Cp_sol = 1146[J/(kg*K)]  // Solid specific heat capacity
  rho_sol = 2700[kg/m^3]  // Solid density
  time = 1[s]
  lambda = 0.19098
  alpha_liq = k_liq/(rho_liq*Cp_liq)  // melt diffusivity
  alpha_sol = k_sol/(rho_sol*Cp_sol)
  raa = sqrt(alpha_liq/alpha_sol)
  s_ri = 5[s]  // rise time
  s_s = 0.2[s]  // half duration
  dmax = 0.5[m]  // max slip
  k_Sn = 59.5[W/(m*K)]
  W = 0.01[m]  // width of geometry
  vpeak = 6
  relapo = 2.7  // to translate source time function
  startpo = 3
  width = 0.4  // width of the bell shape
  ss = 70*10^6[Pa]
  v1 = 0.5  // velocity to calculate initemp
  t1 = 0.004507877548865503  // time to form melt layer
  rise = 9.838642245102521
  dt1 = 0.01
  min_dis = 1e-8[m]

Functions
  an1: Analytic "temp dependent viscosity" | funcname = visco; expr = 10^(-4.55+8160.3/(T-239.5)); args = T; argunit = K; fununit = Pa*s
  int2: Interpolation "regularized yoffe function"
    funcname = yoffe
    table = 
      {0, 0.28633}
      {0.01, 0.76627}
      {0.02, 1.3831}
      {0.03, 1.9452}
      {0.04, 2.0852}
      {0.05, 1.9574}
      {0.06, 1.6493}
      {0.07, 1.3659}
      {0.08, 1.1958}
      {0.09, 1.0822}
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    interp = piecewisecubic
    argunit = s
    fununit = m/s
  an14: Analytic "new initemp analytical" | funcname = initemptrue; expr = Tc+(2*ss*v1/k_sol)*(sqrt(alpha_sol*t1/3.1415)*2.71828^(-(x^2)/(4*alpha_sol*t1))-(x/2)*(1-erf(x/(2*sqrt(alpha_sol*t1))))); argunit = m; fununit = K
  an16: Analytic "Original Yoffe Analytical" | funcname = yoffe_ana; expr = (2*flc1hs(t,0)*flc1hs(s_ri-t/1[s],0)*sqrt((s_ri-t)/t))/(3.14159*s_ri); args = t; argunit = s; fununit = m/s

Variables
  var1 "Variables 1"

Selections
  sel1: Explicit "Tin (Liquid)" on no domains

Couplings
  aveop1: Average "Boundary Average" on boundaries 4

Probes
  bnd2: Boundary "Mov Boundary loc" on boundaries 4
    expr = x
    unit = m
    descr = x-coordinate
    frame = spatial
    table = tbl1
  bnd3: Boundary "MB velocity" on boundaries 4 | expr = d(x,TIME); unit = m/s; frame = spatial; table = tbl1
  bnd4: Boundary "Boundary Probe 4" on boundaries 2 | expr = spf.sr*visco(T); unit = Pa; frame = spatial; table = tbl1

Common definitions
  free1: DeformingDomainDeformedGeometry "Deforming Domain 1" on all domains | smoothingType = laplace
  pnmd1: PrescribedNormalMeshDisplacementDeformedGeometry "Prescribed Normal Mesh Displacement 1" on all boundaries
  pnmv1: PrescribedNormalMeshVelocityDeformedGeometry "Prescribed Normal Mesh Velocity 1" on boundaries 4
    prescribedNormalVelocity = T_lm[W/m^2]/(rho_sol*DelH)

Geometry
  geom1 "Geometry 1" (2D, length unit m)
    r1: Rectangle | layername = Layer 1; layer = loc; layerleft = on; layerbottom = off; size = {L, W}
    fin: Finalize "Form Union"

Materials
  mat1: Common "Tin (Solid)" on domains 2
    def "Basic"
      thermalconductivity = k_sol
      density = rho_sol
      heatcapacity = Cp_sol
  mat2: Common "Tin (Liquid)" on domains 1
    def "Basic"
      thermalconductivity = k_liq
      density = rho_liq
      heatcapacity = Cp_liq
      ratioofspecificheat = 1.4
      dynamicviscosity = visco(T)

Physics
  ht: HeatTransferInSolidsAndFluids on all domains
    dependent variable T
    ShapeProperty.order_temperature = 2
    PhysicalModelProperty.dz = 1[m]
    PhysicalModelProperty.Tref = Tf
    solid1: SolidHeatTransferModel "Solid 1" (default)
    fluid1: FluidHeatTransferModel "Fluid 1" on domains 1 | k_mat = from_mat
    init1: init "Initial Values 1" (default) | Tinit = initemptrue(x)
    ins1: ThermalInsulation (default)
    ins2: ThermalInsulation on boundaries 2, 3, 5-7
    temp2: TemperatureBoundary "Temperature 2" on boundaries 4
      constraintType = unidirectionalVar
      weakConstraints = 1
      T0 = Tf
    temp3: TemperatureBoundary "Temperature 3" on boundaries 7 | weakConstraints = 0; T0 = Tc
    hs1: HeatSource on domains 1 | Q0 = comp1.spf.sr*comp1.spf.sr*visco(T); materialType = nonSolid
  spf: LaminarFlow on domains 1
    dependent variable u = {u, v, w}
    PhysicalModelProperty.Compressibility = Incompressible
    PhysicalModelProperty.ShallowChannelProperty = 0
    PhysicalModelProperty.IncludeGravity = 0
    PhysicalModelProperty.UseReducedPressure = 1
    PhysicalModelProperty.pref = 0
    AdvancedSettingProperty.UsePseudoTime = 1
    fp1: FluidProperties (default) | mu_mat = from_mat
    init1: init "Initial Values 1" (default) | p_init = 0
    wallbc1: WallBC "Wall 1" (default) | utr = {0, 0, 0}; TranslationalVelocityOption = ZeroFixedWall
    wallbc2: WallBC "Wall 2" on boundaries 4 | utr = {0, yoffe(t), 0}; TranslationalVelocityOption = Manual
    inl1: InletBoundary "Inlet 1" on boundaries 2 | BoundaryCondition = Pressure
    out1: OutletBoundary "Outlet 1" on boundaries 3 | NormalFlow = 1
  ev: Events on domains 1
    impl1: ImplicitEvent | condition = v1<0
    is1: IndicatorStates
      indDim = v1
      g = flc1hs(t/1[s]-0.2,0)*(comp1.aveop1(x)-min_dis)
      dimInit = 0
      dimDescr = before t=0.4, the expression is zero; afterwards the evaluation of velocity begins.

Mesh
  mesh1 "Mesh 1" (physics-controlled)
    size: MeshSizeDefault | hauto = 4

Studies
  std1 "Study 1"
    time: Transient "Melt"
      tlist = range(0,dt1,rise)
      usertol = on
      rtol = 1e-4
      initstudy = zero
      initsol = current
      notstudy = zero
      notsol = current

Solver configurations
  sol16 "Solution 16" (study std1)
    v1: Variables "Dependent Variables 1"
      comp1_material_disp: Field "Material mesh displacement (comp1.material.disp)"
        scalemethod = manual
        scaleval = 0.000198800377263
    t1: Time "Time-Dependent Solver 1"
      tlist = range(0,dt1,rise)
      rtol = 1e-4
      atolglobalfactor = 0.05
      atolmethod = {comp1_material_disp, global, comp1_material_lm_nv, global, comp1_p, scaled, comp1_T, global, comp1_T_lm, global, comp1_u, global, comp1_ev_is1_indDim, global}
      atolvaluemethod = {comp1_material_disp, factor, comp1_material_lm_nv, factor, comp1_p, factor, comp1_T, factor, comp1_T_lm, factor, comp1_u, factor, comp1_ev_is1_indDim, factor}
      atolfactor = {comp1_material_disp, 0.1, comp1_material_lm_nv, 0.1, comp1_p, 1, comp1_T, 0.1, comp1_T_lm, 0.1, comp1_u, 0.1, comp1_ev_is1_indDim, 0.1}
      atol = {comp1_material_disp, 1e-3, comp1_material_lm_nv, 1e-3, comp1_p, 1e-3, comp1_T, 1e-3, comp1_T_lm, 1e-3, comp1_u, 1e-3, comp1_ev_is1_indDim, 1e-3}
      maxorder = 2
      eventtol = 0.0001
      stabcntrl = on
      bwinitstepfrac = 0.01
      estrat = exclude
      rhoinf = 0.5
      predictor = constant
      fc1: FullyCoupled
        linsolver = d1
        maxiter = 8
        ntolfact = 0.5
        damp = 0.9
        jtech = once
        stabacc = aacc
        aaccdim = 5
        aaccmix = 0.9
        aaccdelay = 1
      d1: Direct "Direct, Heat Transfer Variables (ht) (merged) (merged)" | pivotperturb = 1.0E-13
      st1: StopCondition
        stopcondterminateon = true
        stopconddesc = Stop expression 2
        stopcondarr = flc1hs(t/1[s]-0.2,0)*comp1.bnd3 < 0

Datasets
  dset11: Solution | solution = none
  dset12: Solution "Probe Solution 12" | solution = sol16
  dset13: Solution | solution = sol16
  cln1: CutLine2D | data = dset13; genpoints = {{-4.35533E-5, 0.00475879}, {0.00999047, 0.00475879}}
  cln2: CutLine2D | data = dset11
  cln3: CutLine2D | data = dset13; genpoints = {{-4.35533E-5, 0.00500731}, {0.0498577, 0.00519573}}
  cln4: CutLine2D | data = dset13; genpoints = {{0.025, 0}, {0.025, 0.01}}
  cln5: CutLine2D | data = dset13; genpoints = {{0.025, 0}, {0.025, 0.01}}
  avh2: Average "Mov Boundary loc" on boundaries 4 | data = dset12
  avh3: Average "MB velocity" on boundaries 4 | data = dset12
  avh4: Average "Boundary Probe 4" on boundaries 2 | data = dset12

Derived values
  pev2: EvalPoint "Mov Boundary loc" | data = avh2; table = tbl1; expr = x
  pev3: EvalPoint "MB velocity" | data = avh3; table = tbl1; expr = d(x,TIME)
  int1: IntLine "Line Integration 1" on boundaries 2 | data = dset13; table = tbl3; expr = (1/visco(T))
  pev4: EvalPoint "Boundary Probe 4" | data = avh4; table = tbl1; expr = spf.sr*visco(T)

Plots
  pg10: PlotGroup1D "1D plot" | data = none
    tblp1: Table "Position and Velocity" | table = tbl1; xaxisdata = auto; plotcolumns = {2, 3, 4}
  pg11: PlotGroup2D "Temperature (ht)" | data = dset13
    surf1: Surface | expr = T
  pg12: PlotGroup2D "Isothermal Contours (ht)" | data = dset13
    con1: Contour | expr = T; levelrounding = off
  pg13: PlotGroup2D "Velocity (spf)" | data = dset13
    surf1: Surface | expr = spf.U
  pg14: PlotGroup2D "Pressure (spf)" | data = dset13
    con1: Contour | expr = p; levelrounding = off
  pg15: PlotGroup1D "Temperature Distribution at final time" | data = dset13
    lngr1: LineGraph "Temperature Distribution" | data = cln3; inputmode = linesecond; expr = T
  pg16: PlotGroup1D "Mov Boundary Velocity evolution" | data = none; xlabel = Time (s); ylabel = x-coordinate (m)
    lngr1: LineGraph on boundaries 4
      data = dset13
      expr = comp1.aveop1(d(x,TIME))
      descr = Average 1
      xdata = expr
      xdataexpr = t
  pg17: PlotGroup1D "semi-shear stress evolution" | data = dset13
    tblp1: Table "Table Graph 1" | table = tbl3

Exports
  tbl1: Table | table = evl2; filename = C:\Users\dyang\Desktop\Donglai Yang\table1.txt
  anim1: Animation | target = player